// SBML level 2 version 4
// Created by JWS2SBML on 2013/06/07 14:15:10

model assmus()

  // Compartments:
  compartment compartment = 1;

  // Species:
  species ATPam in compartment = 150;
  species G1Pam in compartment = 30;
  species ADPGam in compartment = 100;
  species PPam in compartment = 5;
  species $xstarch in compartment = 1000000;
  species ADPam in compartment = 100;
  species Pam in compartment = 2000;
  species Glucoseam in compartment = 3000;
  species Glucosecyt in compartment = 150;
  species G6Pam in compartment = 550;
  species Pcyt in compartment = 2000;
  species G6Pcyt in compartment = 500;
  species G1Pcyt in compartment = 30;
  species F6Pcyt in compartment = 160;
  species ATPcyt in compartment = 200;
  species ADPcyt in compartment = 180;
  species F16BPcyt in compartment = 1;
  species PPcyt in compartment = 1;
  species DHAPcyt in compartment = 5;
  species GAPcyt in compartment = 1;
  species PGA3cyt in compartment = 150;
  species PGA3am in compartment = 160;
  species PGA2cyt in compartment = 20;
  species PEPcyt in compartment = 10;
  species $xpyruvate in compartment = 10;
  species UTPcyt in compartment = 20;
  species UDPGcyt in compartment = 870;
  species Sucrose in compartment = 88000;
  species UDPcyt in compartment = 10;
  species Fructose in compartment = 20;
  species $xsucrose in compartment = 90000;

  // Parameters:
  compartment = 1;
  EXTERNAL = 0;
  KaPGA3AGPase = 10;
  kATPcons = 3;
  kbackwardAT = 0.002;
  kbackwardG6Pexp = 0.01;
  kbackwardGexp = 0.001;
  kbackwardNDPK = 0.001;
  kbackwardPexp = 0.1;
  kbackwardPGA3imp = 0.01;
  kbackwardSucUpt = 0.01;
  Keqald = 81;
  KeqcPGM = 17;
  Keqeno = 6.3;
  KeqGAPDH = 1.724;
  KeqPFP = 3.3;
  KeqPGI = 0.25;
  KeqPGlyM = 0.16;
  KeqpPGM = 17;
  KeqpPPase = 750000;
  KeqSPSSPP = 7770;
  KeqSSynth = 2.4;
  KeqStPase = 0.18;
  KeqTPI = 0.0455;
  KeqUGPase = 0.15;
  kforwardAT = 0.002;
  kforwardG6Pexp = 0.01;
  kforwardGexp = 0.001;
  kforwardNDPK = 0.001;
  kforwardPexp = 0.3;
  kforwardPGA3imp = 0.01;
  kforwardSucUpt = 0.01;
  KiADPHK1 = 20;
  KiADPHK2 = 100;
  KiF16BPPGI = 7500;
  KiFructoseFK = 5000;
  KiFructoseinv = 180;
  KiG6PHK1 = 4100;
  KiGAPald = 1000;
  KiGlucosedegr = 100;
  KiGlucoseinv = 1000;
  KiPAGPase = 160;
  KiPEPPFK = 18;
  KiPEPPGI = 1100;
  KiPSPP = 4000;
  KiSSynthGlucose = 12000;
  KiSucroseSPSSPP = 5000;
  KiUDPSPS = 1000;
  KmADPFK = 13;
  KmADPGAGPase = 280;
  KmADPGStSynth = 150;
  KmADPPK = 20;
  KmATPAGPase = 180;
  KmATPFK = 35;
  KmATPHK1 = 80;
  KmATPHK2 = 280;
  KmATPPK = 86;
  KmDHAPald = 100;
  KmDHAPTPI = 880;
  KmF16BPald = 6;
  KmF16BPPFP = 10;
  KmF6PFK = 1300;
  KmF6PPFK = 290;
  KmF6PPFP = 500;
  KmF6PPGI = 150;
  KmF6PSPS = 5000;
  KmF6PSPSSPP = 900;
  KmFructoseFK = 90;
  KmFructoseHK1 = 11000;
  KmFructoseHK2 = 22000;
  KmG1PAGPase = 100;
  KmG1PStPase = 2600;
  KmG1PUGPase = 80;
  KmG6PPGI = 270;
  KmGAPald = 100;
  KmGAPTPI = 440;
  KmGlucoseHK1 = 41;
  KmGlucoseHK2 = 130;
  KmPEPeno = 150;
  KmPEPPK = 20;
  KmPGA2eno = 150;
  KmPGA2PGlyM = 60;
  KmPGA3PGlyM = 330;
  KmPPAGPase = 260;
  KmPPFP = 10;
  KmPPPFP = 25;
  KmPPUGPase = 130;
  KmPStPase = 6200;
  KmpyruvatePK = 1000;
  KmSSynthFructose = 5900;
  KmSSynthSucrose = 55000;
  KmSSynthUDP = 140;
  KmSSynthUDPG = 1650;
  KmSucroseinv = 28000;
  KmUDPGSPS = 3000;
  KmUDPGSPSSPP = 2000;
  KmUDPGUGPase = 140;
  KmUTPUGPase = 120;
  LPFK = 1;
  nPFK = 2;
  VappSPSSPP = 797;
  VAT = 1;
  VATPcons = 1;
  VforwardStPase = 200;
  VforwardUGPase = 8100;
  VG6Pexp = 1;
  VGexp = 1;
  VmaxAGPase = 312;
  Vmaxald = 430;
  VmaxcPGM = 1842;
  Vmaxdegr = 114;
  Vmaxeno = 448;
  VmaxFK = 376;
  VmaxGAPDH = 301;
  VmaxGK = 160;
  VmaxHK1 = 80;
  VmaxHK2 = 80;
  Vmaxinv = 33;
  VmaxPFK = 135;
  VmaxPFP = 1266;
  VmaxPGI = 1086;
  VmaxPGlyM = 541;
  VmaxPK = 127;
  VmaxpPGM = 1542;
  VmaxpPPase = 500;
  VmaxSPS = 1000;
  VmaxSSynth = 100;
  VmaxStSynth = 171;
  VmaxTPI = 4438;
  VNDPK = 1;
  VPexp = 1;
  VPGA3imp = 1;
  VratioSPSSPP = 1000;
  VSucUpt = 1;

  // Reactions:
  v1: ATPam + G1Pam -> ADPGam + PPam; VmaxAGPase*(1 + PGA3am/KaPGA3AGPase)*(ATPam*G1Pam - ADPGam*PPam)/(compartment*(KmATPAGPase*(1 + ADPGam/KmADPGAGPase) + ATPam)*(1 + Pam/KiPAGPase)*(G1Pam + KmG1PAGPase*(1 + PPam/KmPPAGPase)));  // modifiers: PGA3am, Pam
  v2: ADPGam + $xstarch -> ADPam; VmaxStSynth*ADPGam/(compartment*(KmADPGStSynth + ADPGam));
  v3: PPam -> 2 Pam; VmaxpPPase*(1 - Pam^2/(KeqpPPase*PPam))/compartment;
  v4: Pam + $xstarch -> G1Pam; VforwardStPase*(-(G1Pam/KeqStPase) + Pam)/(compartment*(KmPStPase + KmPStPase*G1Pam/KmG1PStPase + Pam));
  v5: $xstarch -> Glucoseam; Vmaxdegr/(compartment*(1 + Glucoseam/KiGlucosedegr));
  v6: Glucoseam -> Glucosecyt; VGexp*(kforwardGexp*Glucoseam - kbackwardGexp*Glucosecyt)/compartment;
  v7: G6Pam + Pcyt -> G6Pcyt + Pam; VG6Pexp*(-(kbackwardG6Pexp*G6Pcyt*Pam) + kforwardG6Pexp*G6Pam*Pcyt)/compartment;
  v8: G1Pam -> G6Pam; VmaxpPGM*(1 - G6Pam/(KeqpPGM*G1Pam))/compartment;
  v9: G1Pcyt -> G6Pcyt; VmaxcPGM*(1 - G6Pcyt/(KeqcPGM*G1Pcyt))/compartment;
  v10: G6Pcyt -> F6Pcyt; VmaxPGI*(-(F6Pcyt/KeqPGI) + G6Pcyt)/(compartment*(KmG6PPGI + KmG6PPGI*F16BPcyt/KiF16BPPGI + KmG6PPGI*F6Pcyt/KmF6PPGI + G6Pcyt + KmG6PPGI*PEPcyt/KiPEPPGI));  // modifiers: F16BPcyt, PEPcyt
  v11: ATPcyt + F6Pcyt -> ADPcyt + F16BPcyt; VmaxPFK*F6Pcyt*(1 + F6Pcyt/KmF6PPFK)^(-1 + nPFK)/(compartment*KmF6PPFK*((1 + F6Pcyt/KmF6PPFK)^nPFK + LPFK*(1 + PEPcyt/KiPEPPFK)^nPFK));  // modifiers: PEPcyt
  v12: F6Pcyt + PPcyt -> F16BPcyt + Pcyt; VmaxPFP*(-(F16BPcyt*Pcyt/KeqPFP) + F6Pcyt*PPcyt)/(compartment*KmF6PPFP*KmPPPFP*(1 + F16BPcyt/KmF16BPPFP + F6Pcyt/KmF6PPFP + Pcyt/KmPPFP + PPcyt/KmPPPFP));
  v13: F16BPcyt -> DHAPcyt + GAPcyt; Vmaxald*F16BPcyt*(1 - DHAPcyt*GAPcyt/(Keqald*F16BPcyt))/(compartment*KmF16BPald*(1 + DHAPcyt/KmDHAPald + F16BPcyt/KmF16BPald + GAPcyt/KmGAPald + DHAPcyt*GAPcyt/(KmDHAPald*KmGAPald) + F16BPcyt*GAPcyt/(KiGAPald*KmF16BPald)));
  v14: DHAPcyt -> GAPcyt; VmaxTPI*(DHAPcyt - GAPcyt/KeqTPI)/(compartment*(KmDHAPTPI + DHAPcyt + GAPcyt));
  v15: 17 ADPcyt + 17 Pcyt + 6 GAPcyt -> 17 ATPcyt + 6 PGA3cyt; VmaxGAPDH*(1 - ATPcyt*PGA3cyt/(KeqGAPDH*ADPcyt*GAPcyt*Pcyt))/(6*compartment);
  v16: G6Pam + PGA3cyt -> G6Pcyt + PGA3am; VPGA3imp*(-(kbackwardPGA3imp*G6Pcyt*PGA3am) + kforwardPGA3imp*G6Pam*PGA3cyt)/compartment;
  v17: PGA3cyt -> PGA2cyt; VmaxPGlyM*(-(PGA2cyt/KeqPGlyM) + PGA3cyt)/(compartment*(KmPGA3PGlyM + KmPGA3PGlyM*PGA2cyt/KmPGA2PGlyM + PGA3cyt));
  v18: PGA2cyt -> PEPcyt; Vmaxeno*(-(PEPcyt/Keqeno) + PGA2cyt)/(compartment*(KmPGA2eno + KmPGA2eno*PEPcyt/KmPEPeno + PGA2cyt));
  v19: ADPcyt + PEPcyt -> ATPcyt + $xpyruvate; VmaxPK*ADPcyt*PEPcyt/(compartment*KmADPPK*KmPEPPK*(1 + ATPcyt/KmATPPK + xpyruvate*ATPcyt/(KmATPPK*KmpyruvatePK) + PEPcyt/KmPEPPK + ADPcyt*PEPcyt/(KmADPPK*KmPEPPK)));
  v20: G1Pcyt + UTPcyt -> PPcyt + UDPGcyt; VforwardUGPase*(-(PPcyt*UDPGcyt/KeqUGPase) + G1Pcyt*UTPcyt)/(compartment*(G1Pcyt + KmG1PUGPase*(1 + PPcyt/KmPPUGPase))*(KmUTPUGPase*(1 + UDPGcyt/KmUDPGUGPase) + UTPcyt));
  v21: F6Pcyt + UDPGcyt -> Pcyt + Sucrose + UDPcyt; VappSPSSPP*(-(Pcyt*UDPcyt/KeqSPSSPP) + F6Pcyt*UDPGcyt)/(compartment*(KmF6PSPSSPP*KmUDPGSPSSPP + KmF6PSPSSPP*KmUDPGSPSSPP*Sucrose/KiSucroseSPSSPP + VratioSPSSPP*Pcyt*UDPcyt/KeqSPSSPP + F6Pcyt*UDPGcyt));
  v22: Fructose + UDPGcyt -> Sucrose + UDPcyt; VmaxSSynth*Fructose*(1 - Sucrose*UDPcyt/(KeqSSynth*Fructose*UDPGcyt))*UDPGcyt/(compartment*KmSSynthFructose*KmSSynthUDPG*(1 + Glucosecyt/KiSSynthGlucose)*(1 + Sucrose*UDPcyt/(KmSSynthSucrose*KmSSynthUDP) + Fructose*UDPGcyt/(KmSSynthFructose*KmSSynthUDPG)));  // modifiers: Glucosecyt
  v23: $xsucrose -> Sucrose; VSucUpt*(kforwardSucUpt*xsucrose - kbackwardSucUpt*Sucrose)/compartment;
  v24: Sucrose -> Fructose + Glucosecyt; Vmaxinv*Sucrose/(compartment*KmSucroseinv*(1 + Glucosecyt/KiGlucoseinv)*(1 + Fructose/KiFructoseinv + Sucrose/KmSucroseinv));
  v25: ATPcyt + Fructose -> ADPcyt + F6Pcyt; VmaxFK*ATPcyt*Fructose/(compartment*KmATPFK*KmFructoseFK*(1 + F6Pcyt/KmF6PFK)*(1 + Fructose/KiFructoseFK)*(1 + ADPcyt/KmADPFK + ATPcyt/KmATPFK + Fructose/KiFructoseFK)*(1 + Fructose/KmFructoseFK));
  v26: ATPcyt + Glucosecyt -> ADPcyt + G6Pcyt; (VmaxGK*ATPcyt*Glucosecyt/(2*KmATPHK1*KmGlucoseHK1*(1 + ADPcyt/KiADPHK1 + ATPcyt/KmATPHK1)*(1 + G6Pcyt/KiG6PHK1)*(1 + Fructose/KmFructoseHK1 + Glucosecyt/KmGlucoseHK1)) + VmaxGK*ATPcyt*Glucosecyt/(2*KmATPHK2*KmGlucoseHK2*(1 + ADPcyt/KiADPHK2 + ATPcyt/KmATPHK2)*(1 + Fructose/KmFructoseHK2 + Glucosecyt/KmGlucoseHK2)))/compartment;  // modifiers: Fructose
  v27: ATPcyt + UDPcyt -> ADPcyt + UTPcyt; VNDPK*(kforwardNDPK*ATPcyt*UDPcyt - kbackwardNDPK*ADPcyt*UTPcyt)/compartment;
  v28: ADPam + ATPcyt -> ADPcyt + ATPam; VAT*(-(kbackwardAT*ADPcyt*ATPam) + kforwardAT*ADPam*ATPcyt)/compartment;
  v29: Pam -> Pcyt; VPexp*(kforwardPexp*Pam - kbackwardPexp*Pcyt)/compartment;
  v30: ATPcyt -> ADPcyt + Pcyt; kATPcons*VATPcons*ATPcyt/(compartment*ADPcyt);
end
