// SBML level 2 version 1
// Created by JWS2SBML on 2008/05/26 09:12:13

model assmus()

  // Compartments:
  compartment compartment = 1;

  // Species:
  species G1Pam in compartment = 30;
  species ATPam in compartment = 150;
  species ADPGam in compartment = 100;
  species PPam in compartment = 5;
  species PGA3am in compartment = 160;
  species Pam in compartment = 2000;
  species $xstarch in compartment = 1000000;
  species ADPam in compartment = 100;
  species Glucoseam in compartment = 3000;
  species Glucosecyt in compartment = 150;
  species G6Pam in compartment = 550;
  species Pcyt in compartment = 2000;
  species G6Pcyt in compartment = 500;
  species G1Pcyt in compartment = 30;
  species F6Pcyt in compartment = 160;
  species F16BPcyt in compartment = 1;
  species PEPcyt in compartment = 10;
  species ATPcyt in compartment = 200;
  species ADPcyt in compartment = 180;
  species PPcyt in compartment = 1;
  species GAPcyt in compartment = 1;
  species DHAPcyt in compartment = 5;
  species PGA3cyt in compartment = 150;
  species PGA2cyt in compartment = 20;
  species $xpyruvate in compartment = 10;
  species UTPcyt in compartment = 20;
  species UDPGcyt in compartment = 870;
  species Sucrose in compartment = 88000;
  species UDPcyt in compartment = 10;
  species Fructose in compartment = 20;
  species $xsucrose in compartment = 90000;

  // Parameters:
  VmaxAGPase = 312;
  KmG1PAGPase = 100;
  KmATPAGPase = 180;
  KmADPGAGPase = 280;
  KmPPAGPase = 260;
  KiPAGPase = 160;
  KaPGA3AGPase = 10;
  VmaxStSynth = 171;
  KmADPGStSynth = 150;
  VmaxpPPase = 500;
  KeqpPPase = 750000;
  VforwardStPase = 200;
  KmPStPase = 6200;
  KmG1PStPase = 2600;
  KeqStPase = 0.18;
  Vmaxdegr = 114;
  KiGlucosedegr = 100;
  VGexp = 1;
  kforwardGexp = 0.001;
  kbackwardGexp = 0.001;
  VG6Pexp = 1;
  kforwardG6Pexp = 0.01;
  kbackwardG6Pexp = 0.01;
  VmaxpPGM = 1542;
  KeqpPGM = 17;
  VmaxcPGM = 1842;
  KeqcPGM = 17;
  VmaxPGI = 1086;
  KmG6PPGI = 270;
  KmF6PPGI = 150;
  KeqPGI = 0.25;
  KiPEPPGI = 1100;
  KiF16BPPGI = 7500;
  VmaxPFK = 135;
  KmF6PPFK = 290;
  KiPEPPFK = 18;
  nPFK = 2;
  LPFK = 1;
  VmaxPFP = 1266;
  KmF6PPFP = 500;
  KmPPPFP = 25;
  KmF16BPPFP = 10;
  KmPPFP = 10;
  KeqPFP = 3.3;
  Vmaxald = 430;
  Keqald = 81;
  KmF16BPald = 6;
  KmGAPald = 100;
  KmDHAPald = 100;
  KiGAPald = 1000;
  VmaxTPI = 4438;
  KeqTPI = 0.0455;
  KmGAPTPI = 440;
  KmDHAPTPI = 880;
  VmaxGAPDH = 301;
  KeqGAPDH = 1.724;
  VPGA3imp = 1;
  kforwardPGA3imp = 0.01;
  kbackwardPGA3imp = 0.01;
  VmaxPGlyM = 541;
  KeqPGlyM = 0.16;
  KmPGA3PGlyM = 330;
  KmPGA2PGlyM = 60;
  Vmaxeno = 448;
  Keqeno = 6.3;
  KmPGA2eno = 150;
  KmPEPeno = 150;
  VmaxPK = 127;
  KmPEPPK = 20;
  KmADPPK = 20;
  KmpyruvatePK = 1000;
  KmATPPK = 86;
  VforwardUGPase = 8100;
  KmG1PUGPase = 80;
  KmUTPUGPase = 120;
  KmUDPGUGPase = 140;
  KmPPUGPase = 130;
  KeqUGPase = 0.15;
  VmaxSPS = 1000;
  KmF6PSPS = 5000;
  KmUDPGSPS = 3000;
  KiUDPSPS = 1000;
  KiPSPP = 4000;
  VappSPSSPP = 797;
  KmF6PSPSSPP = 900;
  KmUDPGSPSSPP = 2000;
  KiSucroseSPSSPP = 5000;
  KeqSPSSPP = 7770;
  VratioSPSSPP = 1000;
  VmaxSSynth = 100;
  KeqSSynth = 2.4;
  KmSSynthFructose = 5900;
  KmSSynthUDPG = 1650;
  KmSSynthSucrose = 55000;
  KmSSynthUDP = 140;
  KiSSynthGlucose = 12000;
  VSucUpt = 1;
  kforwardSucUpt = 0.01;
  kbackwardSucUpt = 0.01;
  Vmaxinv = 33;
  KmSucroseinv = 28000;
  KiFructoseinv = 180;
  KiGlucoseinv = 1000;
  VmaxFK = 376;
  KmFructoseFK = 90;
  KmATPFK = 35;
  KiFructoseFK = 5000;
  KmADPFK = 13;
  KmF6PFK = 1300;
  KmGlucoseHK1 = 41;
  KmFructoseHK1 = 11000;
  KmATPHK1 = 80;
  KiADPHK1 = 20;
  KiG6PHK1 = 4100;
  VmaxHK1 = 80;
  VmaxHK2 = 80;
  VmaxGK = 160;
  KmGlucoseHK2 = 130;
  KmFructoseHK2 = 22000;
  KmATPHK2 = 280;
  KiADPHK2 = 100;
  VNDPK = 1;
  kforwardNDPK = 0.001;
  kbackwardNDPK = 0.001;
  VAT = 1;
  kforwardAT = 0.002;
  kbackwardAT = 0.002;
  VPexp = 1;
  kforwardPexp = 0.3;
  kbackwardPexp = 0.1;
  VATPcons = 1;
  kATPcons = 3;

  // Reactions:
  vAGPase: G1Pam + ATPam -> ADPGam + PPam; VmaxAGPase*(G1Pam*ATPam - ADPGam*PPam)*(1 + PGA3am/KaPGA3AGPase)/((KmG1PAGPase*(1 + PPam/KmPPAGPase) + G1Pam)*(KmATPAGPase*(1 + ADPGam/KmADPGAGPase) + ATPam))/(1 + Pam/KiPAGPase);  // modifiers: PGA3am, Pam
  vStSynth: ADPGam + $xstarch -> ADPam; VmaxStSynth*ADPGam/(KmADPGStSynth + ADPGam);
  vpPPase: PPam -> 2 Pam; VmaxpPPase*(1 - Pam*Pam/PPam/KeqpPPase);
  vStPase: $xstarch + Pam -> G1Pam; VforwardStPase*(Pam - G1Pam/KeqStPase)/(KmPStPase + Pam + G1Pam*KmPStPase/KmG1PStPase);
  vdegr: $xstarch -> Glucoseam; Vmaxdegr/(1 + Glucoseam/KiGlucosedegr);
  vGexp: Glucoseam -> Glucosecyt; VGexp*(kforwardGexp*Glucoseam - kbackwardGexp*Glucosecyt);
  vG6Pexp: G6Pam + Pcyt -> G6Pcyt + Pam; VG6Pexp*(kforwardG6Pexp*G6Pam*Pcyt - kbackwardG6Pexp*G6Pcyt*Pam);
  vpPGM: G1Pam -> G6Pam; VmaxpPGM*(1 - G6Pam/G1Pam/KeqpPGM);
  vcPGM: G1Pcyt -> G6Pcyt; VmaxcPGM*(1 - G6Pcyt/G1Pcyt/KeqcPGM);
  vPGI: G6Pcyt -> F6Pcyt; VmaxPGI*(G6Pcyt - F6Pcyt/KeqPGI)/(KmG6PPGI + G6Pcyt + F6Pcyt*KmG6PPGI/KmF6PPGI + F16BPcyt*KmG6PPGI/KiF16BPPGI + PEPcyt*KmG6PPGI/KiPEPPGI);  // modifiers: F16BPcyt, PEPcyt
  vPFK: F6Pcyt + ATPcyt -> F16BPcyt + ADPcyt; VmaxPFK*(F6Pcyt/KmF6PPFK)*(1 + F6Pcyt/KmF6PPFK)^(nPFK - 1)/((1 + F6Pcyt/KmF6PPFK)^nPFK + LPFK*(1 + PEPcyt/KiPEPPFK)^nPFK);  // modifiers: PEPcyt
  vPFP: F6Pcyt + PPcyt -> F16BPcyt + Pcyt; VmaxPFP*(1/KmF6PPFP/KmPPPFP)*(F6Pcyt*PPcyt - F16BPcyt*Pcyt/KeqPFP)/(1 + F6Pcyt/KmF6PPFP + PPcyt/KmPPPFP + F16BPcyt/KmF16BPPFP + Pcyt/KmPPFP);
  vald: F16BPcyt -> GAPcyt + DHAPcyt; Vmaxald*(F16BPcyt/KmF16BPald)*(1 - GAPcyt*DHAPcyt/F16BPcyt/Keqald)/(1 + F16BPcyt/KmF16BPald + GAPcyt/KmGAPald + DHAPcyt/KmDHAPald + F16BPcyt*GAPcyt/(KmF16BPald*KiGAPald) + GAPcyt*DHAPcyt/(KmGAPald*KmDHAPald));
  vTPI: DHAPcyt -> GAPcyt; VmaxTPI*(DHAPcyt - GAPcyt/KeqTPI)/(KmDHAPTPI + DHAPcyt + GAPcyt*KmGAPTPI/KmGAPTPI);
  vGAPDH: 6 GAPcyt + 17 ADPcyt + 17 Pcyt -> 6 PGA3cyt + 17 ATPcyt; VmaxGAPDH/6*(1 - PGA3cyt*ATPcyt/(GAPcyt*Pcyt*ADPcyt)/KeqGAPDH);
  vPGA3imp: PGA3cyt + G6Pam -> PGA3am + G6Pcyt; VPGA3imp*(kforwardPGA3imp*PGA3cyt*G6Pam - kbackwardPGA3imp*PGA3am*G6Pcyt);
  vPGlyM: PGA3cyt -> PGA2cyt; VmaxPGlyM*(PGA3cyt - PGA2cyt/KeqPGlyM)/(KmPGA3PGlyM + PGA3cyt + PGA2cyt*KmPGA3PGlyM/KmPGA2PGlyM);
  veno: PGA2cyt -> PEPcyt; Vmaxeno*(PGA2cyt - PEPcyt/Keqeno)/(KmPGA2eno + PGA2cyt + PEPcyt*KmPGA2eno/KmPEPeno);
  vPK: PEPcyt + ADPcyt -> $xpyruvate + ATPcyt; VmaxPK*PEPcyt*ADPcyt/(KmPEPPK*KmADPPK)/(1 + PEPcyt/KmPEPPK + PEPcyt*ADPcyt/(KmPEPPK*KmADPPK) + ATPcyt/KmATPPK + xpyruvate*ATPcyt/(KmpyruvatePK*KmATPPK));
  vUGPase: G1Pcyt + UTPcyt -> UDPGcyt + PPcyt; VforwardUGPase*(G1Pcyt*UTPcyt - UDPGcyt*PPcyt/KeqUGPase)/((KmG1PUGPase*(1 + PPcyt/KmPPUGPase) + G1Pcyt)*(KmUTPUGPase*(1 + UDPGcyt/KmUDPGUGPase) + UTPcyt));
  vSPSSPP: F6Pcyt + UDPGcyt -> Sucrose + Pcyt + UDPcyt; VappSPSSPP*(F6Pcyt*UDPGcyt - UDPcyt*Pcyt/KeqSPSSPP)/(KmF6PSPSSPP*KmUDPGSPSSPP + F6Pcyt*UDPGcyt + UDPcyt*Pcyt*VratioSPSSPP/KeqSPSSPP + Sucrose*KmF6PSPSSPP*KmUDPGSPSSPP/KiSucroseSPSSPP);
  vSSynth: Fructose + UDPGcyt -> Sucrose + UDPcyt; VmaxSSynth*(Fructose*UDPGcyt/(KmSSynthFructose*KmSSynthUDPG))*(1 - Sucrose*UDPcyt/Fructose/UDPGcyt/KeqSSynth)/(1 + Fructose*UDPGcyt/(KmSSynthFructose*KmSSynthUDPG) + Sucrose*UDPcyt/(KmSSynthSucrose*KmSSynthUDP))/(1 + Glucosecyt/KiSSynthGlucose);  // modifiers: Glucosecyt
  vSucUpt: $xsucrose -> Sucrose; VSucUpt*(kforwardSucUpt*xsucrose - kbackwardSucUpt*Sucrose);
  vinv: Sucrose -> Fructose + Glucosecyt; Vmaxinv*(Sucrose/KmSucroseinv)/((1 + Sucrose/KmSucroseinv + Fructose/KiFructoseinv)*(1 + Glucosecyt/KiGlucoseinv));
  vFK: Fructose + ATPcyt -> F6Pcyt + ADPcyt; VmaxFK*(Fructose*ATPcyt/(KmFructoseFK*KmATPFK))/((1 + Fructose/KmFructoseFK)*(1 + Fructose/KiFructoseFK)*(1 + F6Pcyt/KmF6PFK)*(1 + ATPcyt/KmATPFK + Fructose/KiFructoseFK + ADPcyt/KmADPFK));
  vHK: Glucosecyt + ATPcyt -> G6Pcyt + ADPcyt; VmaxGK/2*(Glucosecyt*ATPcyt/(KmGlucoseHK1*KmATPHK1))/((1 + Glucosecyt/KmGlucoseHK1 + Fructose/KmFructoseHK1)*(1 + ATPcyt/KmATPHK1 + ADPcyt/KiADPHK1)*(1 + G6Pcyt/KiG6PHK1)) + VmaxGK/2*(Glucosecyt*ATPcyt/(KmGlucoseHK2*KmATPHK2))/((1 + Glucosecyt/KmGlucoseHK2 + Fructose/KmFructoseHK2)*(1 + ATPcyt/KmATPHK2 + ADPcyt/KiADPHK2));  // modifiers: Fructose
  vNDPK: ATPcyt + UDPcyt -> ADPcyt + UTPcyt; VNDPK*(kforwardNDPK*ATPcyt*UDPcyt - kbackwardNDPK*ADPcyt*UTPcyt);
  vAT: ADPam + ATPcyt -> ATPam + ADPcyt; VAT*(kforwardAT*ATPcyt*ADPam - kbackwardAT*ATPam*ADPcyt);
  vPexp: Pam -> Pcyt; VPexp*(kforwardPexp*Pam - kbackwardPexp*Pcyt);
  vATPcons: ATPcyt -> ADPcyt + Pcyt; VATPcons*kATPcons*(ATPcyt/ADPcyt);
end
